// COMSOL Multiphysics 6.2.0.290 model "SCS_coupled_comsol62.mph"
// Outline of the model tree

Parameters
  Rin = 25[mm]  // REBCO inner radius
  tSC = 49  // REBCO turns
  thTape = 95[um]  // REBCO thickness
  wTape = 10[mm]  // REBCO width
  Rout = Rin+tSC*thTape  // REBCO outer radius
  Air_h = 6[m]  // Air region height
  Air_w = 3[m]  // Air region radius
  It = 400[A]  // Maximum operation current
  n = 21  // EJ Law n-value
  B0 = 0.95443[T]
  alpha = 0.687
  Ic0 = 6300[A]  // Ic(0T, 4.2K) for 10 mm REBCO
  Jc0 = Ic0/(thTape*wTape)
  in_Br = 0.7[T]  // Min radial background field
  out_Br = 1.1[T]  // Max radial background field
  up_Bz = 6.6[T]  // Min axial background field
  down_Bz = 7.2[T]  // Max axial background field
  E0 = 1e-4[V/m]  // EJ Law E0
  ESC = 147.5[GPa]  // Elastic modulus_REBCO
  ESS = 212[GPa]  // Elastic modulus_Stainless steel

Functions
  int1: Interpolation "backField_Br" | importedname = Field data-9T-update.txt; funcs = {{Br, 1}, {Bz, 2}}; struct = grid; funcname = backBr; table = {{Rin, in_Br}, {Rout, out_Br}}; extrap = linear; fununit = T; argunit = m
  int4: Interpolation "backField_Bz" | importedname = Field data-9T-update.txt; funcs = {{Br, 1}, {Bz, 2}}; struct = grid; funcname = backBz; table = {{0, down_Bz}, {wTape, up_Bz}}; extrap = linear; fununit = T; argunit = m
  an4: Analytic "Kim model" | funcname = JcB; expr = Jc0/(1+(sqrt(eps+Br^2)/B0))^alpha; args = {Br, Bz}; fununit = A/m^2; argunit = {T, T}
  an3: Analytic "factor_stain vs Jc/Jc0 [MEM 2016, Zhang]" | funcname = k; expr = (-2962*abs(x)^2+1)*(0.5-atan(4.547e+05*(abs(x)-0.0079))/pi)+(0.5+atan(4.547e+05*(abs(x)-0.0079))/pi)*0.8*exp(-(abs(x)-0.0079)^1*545.7); fununit = 1; argunit = 1
  int2: Interpolation "Ramp_background field"
    importedname = Load-data.xlsx
    funcs = {{Field, 1}, {Iop, 2}}
    filetype = excel
    sheet = Onlyfield+Sametime
    funcname = Field
    table = {{0, 0}, {100, 0}, {1100, 10}, {2900, 10}, {3400, 0}, {3500, 0}}
    fununit = 1
    argunit = s
  int3: Interpolation "Ramp_operation current"
    importedname = Load-data.xlsx
    funcs = {{Field, 1}, {Iop, 2}}
    filetype = excel
    sheet = Onlyfield+Sametime
    funcname = Iop
    table = {{0, 0}, {1200, 0}, {2200, 400}, {2300, 400}, {2800, 0}, {3500, 0}}
    fununit = 1
    argunit = s

Variables
  var1 "REBCO" on selection geom1_arr2_bnd
    Jphi = U1Tz
    Jnorm = abs(Jphi)
    Ephi = E0*((Jnorm/Jc)^(n-1))*Jphi/Jc
    Jc1 = JcB(Br,Bz)
    Jc2 = Jc1*genext2(k(solid.ep1))  // Consider strain-Jc factor
    Jc = Jc2
    beta = beta1
    beta1 = genext2(atan(d(u,z)))  // Tilting angle
    Br0 = mf.Br+backBr(r)*Field(t)/9  // Self and background field
    Bz0 = mf.Bz+backBz(z)*Field(t)/9  // Self and background field
    Br1 = Br0*cos(beta)-Bz0*sin(beta)+eps  // Calibrated field consider tilting
    Bz1 = Br0*sin(beta)+Bz0*cos(beta)+eps  // Calibrated field consider tilting
    Br = Br1
    Bz = Bz1
  var2 "Global"
    Iop = Iop(t)[A]

Selections
  uni1: Union "solid" | entitydim = 2; input = {geom1_csel5_dom, geom1_csel3_dom}

Couplings
  genext1: GeneralExtrusion on boundaries 4
    dstmap = {Rin+20[um], Zg}
    srcframe = geometry
    srcmap = {r, z}
    method = closest
  genext2: GeneralExtrusion on selection geom1_csel5_dom
    dstmap = {r, z}
    srcframe = geometry
    srcmap = {r, z}
    exttol = 0.01
  genext3: GeneralExtrusion on boundaries 5
    dstmap = {Rin+20[um]+1*thTape, Zg}
    srcframe = geometry
    srcmap = {r, z}
    method = closest
  genext4: GeneralExtrusion on boundaries 6
    dstmap = {Rin+20[um]+2*thTape, Zg}
    srcframe = geometry
    srcmap = {r, z}
    method = closest
  genext5: GeneralExtrusion on boundaries 7
    dstmap = {Rin+20[um]+3*thTape, Zg}
    srcframe = geometry
    srcmap = {r, z}
    method = closest
  genext6: GeneralExtrusion on boundaries 8
    dstmap = {Rin+20[um]+4*thTape, Zg}
    srcframe = geometry
    srcmap = {r, z}
    method = closest
  genext7: GeneralExtrusion on boundaries 9
    dstmap = {Rin+20[um]+5*thTape, Zg}
    srcframe = geometry
    srcmap = {r, z}
    method = closest
  genext8: GeneralExtrusion on boundaries 10
    dstmap = {Rin+20[um]+6*thTape, Zg}
    srcframe = geometry
    srcmap = {r, z}
    method = closest
  genext9: GeneralExtrusion on boundaries 11
    dstmap = {Rin+20[um]+7*thTape, Zg}
    srcframe = geometry
    srcmap = {r, z}
    method = closest
  genext10: GeneralExtrusion on boundaries 12
    dstmap = {Rin+20[um]+8*thTape, Zg}
    srcframe = geometry
    srcmap = {r, z}
    method = closest
  genext11: GeneralExtrusion on boundaries 13
    dstmap = {Rin+20[um]+9*thTape, Zg}
    srcframe = geometry
    srcmap = {r, z}
    method = closest
  genext12: GeneralExtrusion on boundaries 14
    dstmap = {Rin+20[um]+10*thTape, Zg}
    srcframe = geometry
    srcmap = {r, z}
    method = closest
  genext13: GeneralExtrusion on boundaries 15
    dstmap = {Rin+20[um]+11*thTape, Zg}
    srcframe = geometry
    srcmap = {r, z}
    method = closest
  genext14: GeneralExtrusion on boundaries 16
    dstmap = {Rin+20[um]+12*thTape, Zg}
    srcframe = geometry
    srcmap = {r, z}
    method = closest
  genext15: GeneralExtrusion on boundaries 17
    dstmap = {Rin+20[um]+13*thTape, Zg}
    srcframe = geometry
    srcmap = {r, z}
    method = closest
  genext16: GeneralExtrusion on boundaries 18
    dstmap = {Rin+20[um]+14*thTape, Zg}
    srcframe = geometry
    srcmap = {r, z}
    method = closest
  genext17: GeneralExtrusion on boundaries 19
    dstmap = {Rin+20[um]+15*thTape, Zg}
    srcframe = geometry
    srcmap = {r, z}
    method = closest
  genext18: GeneralExtrusion on boundaries 20
    dstmap = {Rin+20[um]+16*thTape, Zg}
    srcframe = geometry
    srcmap = {r, z}
    method = closest
  genext19: GeneralExtrusion on boundaries 21
    dstmap = {Rin+20[um]+17*thTape, Zg}
    srcframe = geometry
    srcmap = {r, z}
    method = closest
  genext20: GeneralExtrusion on boundaries 22
    dstmap = {Rin+20[um]+18*thTape, Zg}
    srcframe = geometry
    srcmap = {r, z}
    method = closest
  genext21: GeneralExtrusion on boundaries 23
    dstmap = {Rin+20[um]+19*thTape, Zg}
    srcframe = geometry
    srcmap = {r, z}
    method = closest
  genext22: GeneralExtrusion on boundaries 24
    dstmap = {Rin+20[um]+20*thTape, Zg}
    srcframe = geometry
    srcmap = {r, z}
    method = closest
  genext23: GeneralExtrusion on boundaries 25
    dstmap = {Rin+20[um]+21*thTape, Zg}
    srcframe = geometry
    srcmap = {r, z}
    method = closest
  genext24: GeneralExtrusion on boundaries 26
    dstmap = {Rin+20[um]+22*thTape, Zg}
    srcframe = geometry
    srcmap = {r, z}
    method = closest
  genext25: GeneralExtrusion on boundaries 27
    dstmap = {Rin+20[um]+23*thTape, Zg}
    srcframe = geometry
    srcmap = {r, z}
    method = closest
  genext26: GeneralExtrusion on boundaries 28
    dstmap = {Rin+20[um]+24*thTape, Zg}
    srcframe = geometry
    srcmap = {r, z}
    method = closest
  genext27: GeneralExtrusion on boundaries 29
    dstmap = {Rin+20[um]+25*thTape, Zg}
    srcframe = geometry
    srcmap = {r, z}
    method = closest
  genext28: GeneralExtrusion on boundaries 30
    dstmap = {Rin+20[um]+26*thTape, Zg}
    srcframe = geometry
    srcmap = {r, z}
    method = closest
  genext29: GeneralExtrusion on boundaries 31
    dstmap = {Rin+20[um]+27*thTape, Zg}
    srcframe = geometry
    srcmap = {r, z}
    method = closest
  genext30: GeneralExtrusion on boundaries 32
    dstmap = {Rin+20[um]+28*thTape, Zg}
    srcframe = geometry
    srcmap = {r, z}
    method = closest
  genext31: GeneralExtrusion on boundaries 33
    dstmap = {Rin+20[um]+29*thTape, Zg}
    srcframe = geometry
    srcmap = {r, z}
    method = closest
  genext32: GeneralExtrusion on boundaries 34
    dstmap = {Rin+20[um]+30*thTape, Zg}
    srcframe = geometry
    srcmap = {r, z}
    method = closest
  genext33: GeneralExtrusion on boundaries 35
    dstmap = {Rin+20[um]+31*thTape, Zg}
    srcframe = geometry
    srcmap = {r, z}
    method = closest
  genext34: GeneralExtrusion on boundaries 36
    dstmap = {Rin+20[um]+32*thTape, Zg}
    srcframe = geometry
    srcmap = {r, z}
    method = closest
  genext35: GeneralExtrusion on boundaries 37
    dstmap = {Rin+20[um]+33*thTape, Zg}
    srcframe = geometry
    srcmap = {r, z}
    method = closest
  genext36: GeneralExtrusion on boundaries 38
    dstmap = {Rin+20[um]+34*thTape, Zg}
    srcframe = geometry
    srcmap = {r, z}
    method = closest
  genext37: GeneralExtrusion on boundaries 39
    dstmap = {Rin+20[um]+35*thTape, Zg}
    srcframe = geometry
    srcmap = {r, z}
    method = closest
  genext38: GeneralExtrusion on boundaries 40
    dstmap = {Rin+20[um]+36*thTape, Zg}
    srcframe = geometry
    srcmap = {r, z}
    method = closest
  genext39: GeneralExtrusion on boundaries 41
    dstmap = {Rin+20[um]+37*thTape, Zg}
    srcframe = geometry
    srcmap = {r, z}
    method = closest
  genext40: GeneralExtrusion on boundaries 42
    dstmap = {Rin+20[um]+38*thTape, Zg}
    srcframe = geometry
    srcmap = {r, z}
    method = closest
  genext41: GeneralExtrusion on boundaries 43
    dstmap = {Rin+20[um]+39*thTape, Zg}
    srcframe = geometry
    srcmap = {r, z}
    method = closest
  genext42: GeneralExtrusion on boundaries 44
    dstmap = {Rin+20[um]+40*thTape, Zg}
    srcframe = geometry
    srcmap = {r, z}
    method = closest
  genext43: GeneralExtrusion on boundaries 45
    dstmap = {Rin+20[um]+41*thTape, Zg}
    srcframe = geometry
    srcmap = {r, z}
    method = closest
  genext44: GeneralExtrusion on boundaries 46
    dstmap = {Rin+20[um]+42*thTape, Zg}
    srcframe = geometry
    srcmap = {r, z}
    method = closest
  genext45: GeneralExtrusion on boundaries 47
    dstmap = {Rin+20[um]+43*thTape, Zg}
    srcframe = geometry
    srcmap = {r, z}
    method = closest
  genext46: GeneralExtrusion on boundaries 48
    dstmap = {Rin+20[um]+44*thTape, Zg}
    srcframe = geometry
    srcmap = {r, z}
    method = closest
  genext47: GeneralExtrusion on boundaries 49
    dstmap = {Rin+20[um]+45*thTape, Zg}
    srcframe = geometry
    srcmap = {r, z}
    method = closest
  genext48: GeneralExtrusion on boundaries 50
    dstmap = {Rin+20[um]+46*thTape, Zg}
    srcframe = geometry
    srcmap = {r, z}
    method = closest
  genext49: GeneralExtrusion on boundaries 51
    dstmap = {Rin+20[um]+47*thTape, Zg}
    srcframe = geometry
    srcmap = {r, z}
    method = closest
  genext50: GeneralExtrusion on boundaries 52
    dstmap = {Rin+20[um]+48*thTape, Zg}
    srcframe = geometry
    srcmap = {r, z}
    method = closest

Pairs
  ap1: Contact "接触对 1" | source: boundaries 57; destination: boundaries 58
  ap2: Contact "接触对 2" | source: boundaries 61; destination: boundaries 62
  ap3: Contact "接触对 3" | source: boundaries 65; destination: boundaries 66
  ap4: Contact "接触对 4" | source: boundaries 69; destination: boundaries 70
  ap5: Contact "接触对 5" | source: boundaries 73; destination: boundaries 74
  ap6: Contact "接触对 6" | source: boundaries 77; destination: boundaries 78
  ap7: Contact "接触对 7" | source: boundaries 81; destination: boundaries 82
  ap8: Contact "接触对 8" | source: boundaries 85; destination: boundaries 86
  ap9: Contact "接触对 9" | source: boundaries 89; destination: boundaries 90
  ap10: Contact "接触对 10" | source: boundaries 93; destination: boundaries 94
  ap11: Contact "接触对 11" | source: boundaries 97; destination: boundaries 98
  ap12: Contact "接触对 12" | source: boundaries 101; destination: boundaries 102
  ap13: Contact "接触对 13" | source: boundaries 105; destination: boundaries 106
  ap14: Contact "接触对 14" | source: boundaries 109; destination: boundaries 110
  ap15: Contact "接触对 15" | source: boundaries 113; destination: boundaries 114
  ap16: Contact "接触对 16" | source: boundaries 117; destination: boundaries 118
  ap17: Contact "接触对 17" | source: boundaries 121; destination: boundaries 122
  ap18: Contact "接触对 18" | source: boundaries 125; destination: boundaries 126
  ap19: Contact "接触对 19" | source: boundaries 129; destination: boundaries 130
  ap20: Contact "接触对 20" | source: boundaries 133; destination: boundaries 134
  ap21: Contact "接触对 21" | source: boundaries 137; destination: boundaries 138
  ap22: Contact "接触对 22" | source: boundaries 141; destination: boundaries 142
  ap23: Contact "接触对 23" | source: boundaries 145; destination: boundaries 146
  ap24: Contact "接触对 24" | source: boundaries 149; destination: boundaries 150
  ap25: Contact "接触对 25" | source: boundaries 153; destination: boundaries 154
  ap26: Contact "接触对 26" | source: boundaries 157; destination: boundaries 158
  ap27: Contact "接触对 27" | source: boundaries 161; destination: boundaries 162
  ap28: Contact "接触对 28" | source: boundaries 165; destination: boundaries 166
  ap29: Contact "接触对 29" | source: boundaries 169; destination: boundaries 170
  ap30: Contact "接触对 30" | source: boundaries 173; destination: boundaries 174
  ap31: Contact "接触对 31" | source: boundaries 177; destination: boundaries 178
  ap32: Contact "接触对 32" | source: boundaries 181; destination: boundaries 182
  ap33: Contact "接触对 33" | source: boundaries 185; destination: boundaries 186
  ap34: Contact "接触对 34" | source: boundaries 189; destination: boundaries 190
  ap35: Contact "接触对 35" | source: boundaries 193; destination: boundaries 194
  ap36: Contact "接触对 36" | source: boundaries 197; destination: boundaries 198
  ap37: Contact "接触对 37" | source: boundaries 201; destination: boundaries 202
  ap38: Contact "接触对 38" | source: boundaries 205; destination: boundaries 206
  ap39: Contact "接触对 39" | source: boundaries 209; destination: boundaries 210
  ap40: Contact "接触对 40" | source: boundaries 213; destination: boundaries 214
  ap41: Contact "接触对 41" | source: boundaries 217; destination: boundaries 218
  ap42: Contact "接触对 42" | source: boundaries 221; destination: boundaries 222
  ap43: Contact "接触对 43" | source: boundaries 225; destination: boundaries 226
  ap44: Contact "接触对 44" | source: boundaries 229; destination: boundaries 230
  ap45: Contact "接触对 45" | source: boundaries 233; destination: boundaries 234
  ap46: Contact "接触对 46" | source: boundaries 237; destination: boundaries 238
  ap47: Contact "接触对 47" | source: boundaries 241; destination: boundaries 242
  ap48: Contact "接触对 48" | source: boundaries 245; destination: boundaries 246
  ap49: Contact "接触对 49" | source: boundaries 249; destination: boundaries 250

Geometry
  geom1 "Geometry 1" (2D axisymmetric, length unit m)
    ls1: LineSegment "Line REBCO"
      specify1 = coord
      coord1 = {Rin+20[um], 0}
      specify2 = coord
      coord2 = {Rin+20[um], wTape}
    arr2: Array "Array REBCO"
      contributeto = csel1
      input = ls1
      size = {tSC, 1}
      fullsize = {tSC, 1}
      displ = {thTape, 0}
    r2: Rectangle "Air" | contributeto = csel4; pos = {0, -Air_h/2+wTape/2}; size = {Air_w, Air_h}
    r8: Rectangle "Cu" | pos = {Rin, 0}; size = {thTape, wTape}
    arr1: Array "Array Cu" | contributeto = csel5; input = r8; size = {tSC, 1}; fullsize = {tSC, 1}; displ = {thTape, 0}
    r7: Rectangle "Mandrel Bobbin" | contributeto = csel3; pos = {Rin-0.005, 0}; size = {5e-3, wTape}
    uni1: Union | contributeto = csel2; input = arr2, r2
    fin: Finalize "Form Assembly" | action = assembly; pairtype = contact

Materials
  mat1: Common "Air" on domains 1
    def "Basic"
      relpermeability = 1
      relpermittivity = 1
      electricconductivity = 100[S/m]
  mat2: Common "REBCO" on selection geom1_csel5_dom
    def "Basic"
      density = 7850[kg/m^3]
      youngsmodulus = ESC
      poissonsratio = 0.3
  mat3: Common "SS" on selection geom1_csel3_dom
    def "Basic"
      density = 8900[kg/m^3]
      youngsmodulus = ESS
      poissonsratio = 0.3

Physics
  mf: InductionCurrents "Magnetic Fields" on selection geom1_csel2_dom
    dependent variable A = {Ar, Aphi, Az}
    al1: AmperesLawFluid "Ampère's Law 1" (default)
      AllowDeprecatedCurves = 1
      normBr_crel_BH_RemanentFluxDensity_mat = userdef
      normBr_crel_BH_RemanentFluxDensity = 0
      AllowSolidMaterials = 1
    axi1: AxialSymmetry (default)
    mi1: MagneticInsulation (default)
    init1: init "Initial Values 1" (default)
    dcont1: Continuity "连续性" (default) | pairDisconnect = 1
    scu1: SurfaceCurrent "Surface Current Density 1" on selection geom1_arr2_bnd | Js0 = {0, Jphi*thTape, 0}
  gb: GeneralFormBoundaryPDE on selection geom1_csel1_bnd
    dependent variable U1
    ShapeProperty.order = 1
    Units.DependentVariableQuantity = none
    Units.CustomDependentVariableUnit = A/m
    Units.CustomSourceTermUnit = T/s
    gfeq1: GeneralFormPDE (default) | f = -d(Br,TIME); Ga = {0, -Ephi}; da = 0
    init1: init "Initial Values 1" (default)
    dir1: DirichletBoundary "Dirichlet Boundary Condition 1" on points 4, 6, 8, 10, 12, 14, 16, 18, 20, 22, 24, 26, 28, 30, 32, 34, 36, 38, 40, 42, 44, 46, 48, 50, 52, 54, 56, 58, 60, 62, 64, 66, 68, 70, 72, 74, 76, 78, 80, 82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
      r = Iop/thTape
    dir2: DirichletBoundary "Dirichlet Boundary Condition 1.1" on points 3, 5, 7, 9, 11, 13, 15, 17, 19, 21, 23, 25, 27, 29, 31, 33, 35, 37, 39, 41, 43, 45, 47, 49, 51, 53, 55, 57, 59, 61, 63, 65, 67, 69, 71, 73, 75, 77, 79, 81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
      r = 0
  solid: SolidMechanics on domains 2-51
    dependent variable u = {u, v, w}
    ShapeProperty.order_displacement = 1
    StructuralTransientBehavior.StructuralTransientBehavior = Quasistatic
    AdvancedSettings.GroupPhysOdesRc = 0
    AdvancedSettings.GroupPhysOdesAtt = 0
    AdvancedSettings.GroupPhysOdesRd = 0
    lemm1: LinearElasticModel "Linear Elastic Material 1" (default)
      te1: ThermalExpansion (disabled) on all domains | alpha_mat = userdef; alpha = 0; minput_temperature = 4.2[K]
    axi1: AxialSymmetrySolid "Axial Symmetry 1" (default)
    free1: Free (default)
    init1: init "Initial Values 1" (default)
    dcnt1: SolidContact "接触" (default) | pairDisconnect = 1; integrationOrder = 2
    disp1: Displacement1 "Prescribed Displacement 1" on boundaries 55, 59, 63, 67, 71, 75, 79, 83, 87, 91, 95, 99, 103, 107, 111, 115, 119, 123, 127, 131, 135, 139, 143, 147, 151, 155, 159, 163, 167, 171, 175, 179, 183, 187, 191, 195, 199, 203, 207, 211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
      Direction = {free, free, prescribed}
    bl1: BodyLoad on domains 3 | FperVol = {genext1(Jphi*Bz), 0, genext1(-Jphi*Br)}
    bl2: BodyLoad on domains 4 | FperVol = {genext3(Jphi*Bz), 0, genext3(-Jphi*Br)}
    bl3: BodyLoad on domains 5 | FperVol = {genext4(Jphi*Bz), 0, genext4(-Jphi*Br)}
    bl4: BodyLoad on domains 6 | FperVol = {genext5(Jphi*Bz), 0, genext5(-Jphi*Br)}
    bl5: BodyLoad on domains 7 | FperVol = {genext6(Jphi*Bz), 0, genext6(-Jphi*Br)}
    bl6: BodyLoad on domains 8 | FperVol = {genext7(Jphi*Bz), 0, genext7(-Jphi*Br)}
    bl7: BodyLoad on domains 9 | FperVol = {genext8(Jphi*Bz), 0, genext8(-Jphi*Br)}
    bl8: BodyLoad on domains 10 | FperVol = {genext9(Jphi*Bz), 0, genext9(-Jphi*Br)}
    bl9: BodyLoad on domains 11 | FperVol = {genext10(Jphi*Bz), 0, genext10(-Jphi*Br)}
    bl10: BodyLoad on domains 12 | FperVol = {genext11(Jphi*Bz), 0, genext11(-Jphi*Br)}
    bl11: BodyLoad on domains 13 | FperVol = {genext12(Jphi*Bz), 0, genext12(-Jphi*Br)}
    bl12: BodyLoad on domains 14 | FperVol = {genext13(Jphi*Bz), 0, genext13(-Jphi*Br)}
    bl13: BodyLoad on domains 15 | FperVol = {genext14(Jphi*Bz), 0, genext14(-Jphi*Br)}
    bl14: BodyLoad on domains 16 | FperVol = {genext15(Jphi*Bz), 0, genext15(-Jphi*Br)}
    bl15: BodyLoad on domains 17 | FperVol = {genext16(Jphi*Bz), 0, genext16(-Jphi*Br)}
    bl16: BodyLoad on domains 18 | FperVol = {genext17(Jphi*Bz), 0, genext17(-Jphi*Br)}
    bl17: BodyLoad on domains 19 | FperVol = {genext18(Jphi*Bz), 0, genext18(-Jphi*Br)}
    bl18: BodyLoad on domains 20 | FperVol = {genext19(Jphi*Bz), 0, genext19(-Jphi*Br)}
    bl19: BodyLoad on domains 21 | FperVol = {genext20(Jphi*Bz), 0, genext20(-Jphi*Br)}
    bl20: BodyLoad on domains 22 | FperVol = {genext21(Jphi*Bz), 0, genext21(-Jphi*Br)}
    bl21: BodyLoad on domains 23 | FperVol = {genext22(Jphi*Bz), 0, genext22(-Jphi*Br)}
    bl22: BodyLoad on domains 24 | FperVol = {genext23(Jphi*Bz), 0, genext23(-Jphi*Br)}
    bl23: BodyLoad on domains 25 | FperVol = {genext24(Jphi*Bz), 0, genext24(-Jphi*Br)}
    bl24: BodyLoad on domains 26 | FperVol = {genext25(Jphi*Bz), 0, genext25(-Jphi*Br)}
    bl25: BodyLoad on domains 27 | FperVol = {genext26(Jphi*Bz), 0, genext26(-Jphi*Br)}
    bl26: BodyLoad on domains 28 | FperVol = {genext27(Jphi*Bz), 0, genext27(-Jphi*Br)}
    bl27: BodyLoad on domains 29 | FperVol = {genext28(Jphi*Bz), 0, genext28(-Jphi*Br)}
    bl28: BodyLoad on domains 30 | FperVol = {genext29(Jphi*Bz), 0, genext29(-Jphi*Br)}
    bl29: BodyLoad on domains 31 | FperVol = {genext30(Jphi*Bz), 0, genext30(-Jphi*Br)}
    bl30: BodyLoad on domains 32 | FperVol = {genext31(Jphi*Bz), 0, genext31(-Jphi*Br)}
    bl31: BodyLoad on domains 33 | FperVol = {genext32(Jphi*Bz), 0, genext32(-Jphi*Br)}
    bl32: BodyLoad on domains 34 | FperVol = {genext33(Jphi*Bz), 0, genext33(-Jphi*Br)}
    bl33: BodyLoad on domains 35 | FperVol = {genext34(Jphi*Bz), 0, genext34(-Jphi*Br)}
    bl34: BodyLoad on domains 36 | FperVol = {genext35(Jphi*Bz), 0, genext35(-Jphi*Br)}
    bl35: BodyLoad on domains 37 | FperVol = {genext36(Jphi*Bz), 0, genext36(-Jphi*Br)}
    bl36: BodyLoad on domains 38 | FperVol = {genext37(Jphi*Bz), 0, genext37(-Jphi*Br)}
    bl37: BodyLoad on domains 39 | FperVol = {genext38(Jphi*Bz), 0, genext38(-Jphi*Br)}
    bl38: BodyLoad on domains 40 | FperVol = {genext39(Jphi*Bz), 0, genext39(-Jphi*Br)}
    bl39: BodyLoad on domains 41 | FperVol = {genext40(Jphi*Bz), 0, genext40(-Jphi*Br)}
    bl40: BodyLoad on domains 42 | FperVol = {genext41(Jphi*Bz), 0, genext41(-Jphi*Br)}
    bl41: BodyLoad on domains 43 | FperVol = {genext42(Jphi*Bz), 0, genext42(-Jphi*Br)}
    bl42: BodyLoad on domains 44 | FperVol = {genext43(Jphi*Bz), 0, genext43(-Jphi*Br)}
    bl43: BodyLoad on domains 45 | FperVol = {genext44(Jphi*Bz), 0, genext44(-Jphi*Br)}
    bl44: BodyLoad on domains 46 | FperVol = {genext45(Jphi*Bz), 0, genext45(-Jphi*Br)}
    bl45: BodyLoad on domains 47 | FperVol = {genext46(Jphi*Bz), 0, genext46(-Jphi*Br)}
    bl46: BodyLoad on domains 48 | FperVol = {genext47(Jphi*Bz), 0, genext47(-Jphi*Br)}
    bl47: BodyLoad on domains 49 | FperVol = {genext48(Jphi*Bz), 0, genext48(-Jphi*Br)}
    bl48: BodyLoad on domains 50 | FperVol = {genext49(Jphi*Bz), 0, genext49(-Jphi*Br)}
    bl49: BodyLoad on domains 51 | FperVol = {genext50(Jphi*Bz), 0, genext50(-Jphi*Br)}
    cnt1: SolidContact "接触 1" on all boundaries
      integrationOrder = 2
      tolcontact = 1.0295630141*1e-4
      pairs = {ap1, ap2, ap3, ap4, ap5, ap6, ap7, ap8, ap9, ap10, ap11, ap12, ap13, ap14, ap15, ap16, ap17, ap18, ap19, ap20, ap21, ap22, ap23, ap24, ap25, ap26, ap27, ap28, ap29, ap30, ap31, ap32, ap33, ap34, ap35, ap36, ap37, ap38, ap39, ap40, ap41, ap42, ap43, ap44, ap45, ap46, ap47, ap48, ap49}

Mesh
  mesh1 "Mesh"
    size: MeshSizeDefault | hmax = 0.402; hmin = 0.0018; hcurve = 0.3; hgrad = 1.3
    edg1: Edge "Edge-REBCO" on selection geom1_csel1_bnd
      dis1: Distribution on selection geom1_csel1_bnd | numelem = 100
    map2: Map "Mapped-Tapes" on selection geom1_csel5_dom
      dis1: Distribution on boundaries 57, 58, 61, 62, 65, 66, 69, 70, 73, 74, 77, 78, 81, 82, 85, 86, 89, 90, 93, 94, 97, 98, 101, 102, 105, 106, 109, 110, 113, 114, 117, 118, 121, 122, 125, 126, 129, 130, 133, 134, 137, 138, 141, 142, 145, 146, 149, 150, 153, 154, 157, 158, 161, 162, 165, 166, 169, 170, 173, 174, 177, 178, 181, 182, 185, 186, 189, 190, 193, 194, 197, 198, 201, 202, 205, 206, 209, 210, 213, 214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
        type = predefined
        elemcount = 100
        symmetric = on
      dis2: Distribution on boundaries 59, 60, 63, 64, 67, 68, 71, 72, 75, 76, 79, 80, 83, 84, 87, 88, 91, 92, 95, 96, 99, 100, 103, 104, 107, 108, 111, 112, 115, 116, 119, 120, 123, 124, 127, 128, 131, 132, 135, 136, 139, 140, 143, 144, 147, 148, 151, 152, 155, 156, 159, 160, 163, 164, 167, 168, 171, 172, 175, 176, 179, 180, 183, 184, 187, 188, 191, 192, 195, 196, 199, 200, 203, 204, 207, 208, 211, 212, 215, 216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
        numelem = 2
    map4: Map "Mapped-Bobbin" on domains 2
      dis1: Distribution on boundaries 54 | numelem = 100
      dis2: Distribution on boundaries 55, 56 | type = predefined; elemcount = 24; elemratio = 2.5
    ftri1: FreeTri "Free Triangular-Air" on remaining entities
      size1: Size on entire geometry

Studies
  std1 "Study 1"
    time: Transient "Time Dependent" | tlist = range(0,100,3500); usertol = on; rtol = 1e-3

Solver configurations
  sol1 "解 1" (study std1)
    v1: Variables "因变量 1"
      comp1_u: Field "位移场 (comp1.u)" | scalemethod = manual; scaleval = 1e-2*6.7082039325
    t1: Time "瞬态求解器 1"
      tlist = range(0,100,3500)
      rtol = 1e-3
      tstepsbdf = intermediate
      maxstepconstraintbdf = const
      maxstepbdf = 5
      estrat = exclude
      dDef: Direct "直接"
      fc1: FullyCoupled "全耦合 1" | maxiter = 500; jtech = onevery

Datasets
  dset3: Solution "Study 1-REBCO" on selection geom1_arr2_bnd | solution = sol1
  dset4: Solution "Study 1-copper" on domains 3-51 | solution = sol1
  dset6: Solution "Study 1" | solution = sol1

Plots
  pg11: PlotGroup2D "Results" | data = none
    surf3: Surface "Hoopstrain" | data = dset4; expr = solid.ePHIPHI*100
      def1: Deform "Deformation 1" | expr = {u, v}
    line1: Line "Jphi/Jc" | data = dset3; expr = Jphi/Jc
      def1: Deform "Deformation 1" | expr = {0.01, 0}
    line3: Line "Bz" | data = dset3; expr = Bz
      def1: Deform "Deformation 1" | expr = {0.02, 0}
    line4: Line "Br" | data = dset3; expr = Br
      def1: Deform "Deformation 1" | expr = {0.03, 0}